@DSL DefaultDSL;
@Behaviour IsotropicLinearHardeningMises;

@StateVariable StrainStensor eel;
eel.setGlossaryName("ElasticStrain");
@StateVariable strain p;
p.setGlossaryName("EquivalentPlasticStrain");

@Parameter young =  2.e5;
young.setGlossaryName("YoungModulus");
@Parameter nu    =   0.2;
nu.setGlossaryName("PoissonRatio");
@Parameter H     =  100;
H.setEntryName("HardeningSlope");
@Parameter s0    =  10;
s0.setGlossaryName("YieldStress");

/*!
 * computation of the prediction operator: we only provide the elastic
 * operator.
 *
 * We could also provide a tangent operator, but this would mean
 * saving an auxiliary state variable stating if a plastic loading
 * occured at the previous time step.
 */
@PredictionOperator{
  const auto lambda = computeLambda(young,nu);
  const auto mu     = computeMu(young,nu);
  Dt = lambda*Stensor4::IxI()+2*mu*Stensor4::Id();
}

/*!
 * behaviour integration using a fully implicit Euler-backwark scheme.
 */
@ProvidesSymmetricTangentOperator;
@Integrator{
  const auto lambda = computeLambda(young,nu);
  const auto mu     = computeMu(young,nu);
  eel += deto;
  const auto se     = 2*mu*deviator(eel);
  const auto seq_e  = sigmaeq(se);
  const auto b      = seq_e-s0-H*p>stress{0};
  if(b){
    const auto iseq_e = 1/seq_e;
    const auto n      = eval(3*se/(2*seq_e));
    const auto cste   = 1/(H+3*mu);
    dp   = (seq_e-s0-H*p)*cste;
    eel -= dp*n;
    if(computeTangentOperator_){
      if(smt==CONSISTENTTANGENTOPERATOR){
    Dt = (lambda*Stensor4::IxI()+2*mu*Stensor4::Id()
          -4*mu*mu*(dp*iseq_e*(Stensor4::M()-(n^n))+cste*(n^n)));
      } else {
    Dt = lambda*Stensor4::IxI()+2*mu*Stensor4::Id();
      }
    }
  } else {
    if(computeTangentOperator_){
      Dt = lambda*Stensor4::IxI()+2*mu*Stensor4::Id();
    }
  }
  sig = lambda*trace(eel)*Stensor::Id()+2*mu*eel;
}
